# AguaClara Water Treatment Plants
# Automated Design
# User Inputs:
# Design References
# [reference: userinputs.xmcd]
# [reference: DesignAssumptions.xmcd]
# [reference: MathFunctions.xmcd]
# [reference: PipeDatabase.xmcd]
# [reference: MinorLossCoefficients.xmcd]
# [reference: FluidsFunctions.xmcd]
# [reference: Channel.xmcd]
W_Channel = 0.244687 m
L_Channel = 3.45 m
ND_SedPipeEntrance = 6 in
# [reference: Sedimentation.xmcd]
H_SedBelowSlope = 0.866025 m
H_SedBelowStraight = 0.133975 m
H_SedAbove = 0.25 m
H_SedPlate = 0.779423 m
HW_Sed = 2.02942 m
H_Sed = 2.12942 m
Z_Mp = 1.42942 m
L_Sed = 4.52932 m
L_SedPlate = 3.58304 m  # Length of tank occupied by plate settlers (not including angled section)
N_SedPlates = 63
V_SedC = 2.70537 m/day
V_SedUp = 68.3546 m/day
# [reference: FCM.xmcd]
N_Fcm = 2
ID_FcmTube = 0.125 in
ID_FcmTube = 3.175 mm
L_FcmTube = 116.725 cm
Q_FcmTubeMax = 241.875 mL/min
HL_FcmValve = 4.31402 cm
# [reference: Flocculation.xmcd]
W_FlocChannel = 0.5 m
S_FlocBaffle = [0.128245; 0.181366; 0.379068] m
B_FlocBaffle = [0.148245; 0.201366; 0.399068] m
N_FlocBafflesMin = 28
HL_Floc = 6.2957 cm
X_FlocBaffles = [
    0.2286, 4.13526;
    0.376845, 3.73619;
    0.52509, 3.33712;
    0.673335, 2.93805;
    0.82158, 2.53898;
    0.969825, 2.13991;
    1.11807, 1.74085;
    1.26631, 1.34178;
    1.41456, 0.942709;
    1.61592, 0.543641;
    1.81729, 0;
    2.01866, 0;
    2.22002, 0;
    2.42139, 0;
    2.62275, 0;
    2.82412, 0;
    3.02548, 0;
    3.42455, 0;
    3.82362, 0
] m
HW_FlocStart = 2.09238 m
W_FlocPort = 0.379068 m
L_FlocBaffles = [
    1.83706, 1.46082;
    2.00001, 1.62378;
    1.83706, 1.46082;
    2.00001, 1.62378;
    1.83706, 1.46082;
    2.00001, 1.62378;
    1.83706, 1.46082;
    2.00001, 1.62378;
    1.83706, 1.46082;
    1.92033, 1.62378;
    1.75737, 0;
    1.92033, 0;
    1.75737, 0;
    1.92033, 0;
    1.75737, 0;
    1.92033, 0;
    1.75737, 0;
    1.62378, 0;
    1.46082, 0
] m
H_FlocPort = 0.75 m
N_FlocBaffles = 29
Z_FlocBaffles = [
    0, 0;
    0.192367, 0.568602;
    0, 0;
    0.192367, 0.568602;
    0, 0;
    0.192367, 0.568602;
    0, 0;
    0.192367, 0.568602;
    0, 0;
    0.272049, 0.568602;
    0, 0;
    0.272049, 0;
    0, 0;
    0.272049, 0;
    0, 0;
    0.272049, 0;
    0, 0;
    0.568602, 0;
    0, 0
] m
Gt_FlocMinFlow = 5207.9
# [reference: EntranceTank.xmcd]
ND_Lfom = 6 in
HL_Rm = 12.0621 cm
N_Lfom = 2
D_LfomOrifices = 17 mm
N_LfomOrifices = [5; 4; 3; 2; 3; 1; 1; 2; 1; 2]
Q_LfomErrorMax = 1.37663 %
L_Et = 1.04775 m
W_Et = 1.04775 m
HW_Et = 1.27783 m
H_Et = 1.37783 m
# [reference: Launder.xmcd]
N_SedLaunderOrifices = 70
Q_SedLaunderOrifices = 3.07143 L/min
Z_SedLaunder = 1.90442 m
ND_SedLaunder = 6 in
D_SedLaunderOrifice = 9 mm
# [reference: PlantLevelTank.xmcd]
HW_Plt = 0.5 m
ND_PltWeir = 0.2032 m
H_PltWeir = 0.455617 m
H_Plt = 0.7 m
W_Plt = 0.4088 m
# [reference: SludgeDrain.xmcd]
N_SedSludgeOrifices = 45
ND_SedSludge = 3 in
Q_SludgeDrainInitial = 612.794 L/min
D_SedSludgeOrifice = 5 mm
# Any additional needed elevations should be calculated in the files above.
# AutoCAD References
H_Channel := .3 m
L_Floc := 9.059 m
H_Floc := H_Sed
baffle_amp := .5 in
baffle_thick := 4 mm
baffle_slope := 90 deg
baffle_width := W_FlocChannel
baffle_col := 1  # this is a constant!
baffle_periods := 8.5
baffle_y := 7 cm
baffle_num := 1
baffle_x := 4 in
# [reference: basics.xmcd]
# [reference: pipe.xmcd]
# [reference: tank.xmcd]
# [reference: lamina.xmcd]
# [reference: cross.xmcd]
# [reference: Tee.xmcd]
# [reference: elbow.xmcd]
# [reference: Sludge.xmcd]
# [reference: Channel.xmcd]
# [reference: Manifold.xmcd]
# [reference: SedTankslopes.xmcd]
# [reference: SedTank.xmcd]
# [component: inputs SedTank]
# [reference: floctank.xmcd]
# [component: inputs FlocTank]
# [reference: EntranceTank.xmcd]
# [reference: platform.xmcd]
# [reference: alumstock.xmcd]
# [reference: PlantLevelTank.xmcd]
# [reference: chlorinestock.xmcd]
