# AguaClara Design Tool
Ti_wanted := 5 min
# [reference: BasicClientInputs.xmcd]
# [reference: ExpertInputs.xmcd]
Q_Plant = 0.01 m^3/s
# [reference: DesignAssumptions.xmcd]
# [reference: MathFunctions.xmcd]
# [reference: PipeDatabase.xmcd]
# [reference: MinorLossCoefficients.xmcd]
# [reference: FluidsFunctions.xmcd]
# [reference: Sedimentation Tank.xmcd]
# [reference: Floc Hopper - New Design.xmcd]
# [reference: FCM.xmcd]
# [reference: Flocculator 3.xmcd]
# [reference: Rapid Mix.xmcd]
# [reference: Materials List.xmcd]
# [reference: ChemStorageCylinders.xmcd]
# [reference: Final Doser Redo.xmcd]
# [reference: AutoCADMasterProgram.xmcd]
Q_Plant = 0.01 m^3/s
Q_Plant = 0.01 m^3/s
AC_FlocTank = [
    "-layer m floctank";
    "c t 91,91,91";
    "floctank";
    "  ";
    "_-view o t _zoom w 0.16,4.46,0 -3.08181,7.39,2.17562 _box 0,4.62,0 -2.92181,7.23,2.17562 _box 0.15,4.47,-0.15 -3.07181,7.38,2.17562 _subtract 0.15,4.47,-0.15  0,4.62,0 ";
    "_box -3.07181,5.16,0 0.15,5.31,2.17562";
    "_box -0.15727,5.16,0.54 0,5.31,0";
    "_subtract -3.07181,5.16,0  -0.15727,5.16,0.54 ";
    "_box -3.07181,5.85,0 0.15,6,2.17562";
    "_box -2.92181,5.85,0.54 -2.76454,6,0"
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]
AC_SedTank =  # no stored result
AC_ChemTanks = ["-layer m alumtanks"; "c t 132,132,132"; "alumtanks"; "  "; "_-view o t"; "_cylinder 1.85549,5.95069,2.64056 0.42931 1.27794"; "_cylinder 1.85549,5.95069,2.64556 0.42431 1.27294"; "_-view o t"; "_subtract 1.42618,5.95069,2.64056  1.43118,5.95069,2.64056 "; "_mirror all  1.84549,5.48137 1.86549,5.48137 "; "_union all "; "-layer s 0"; "  "; "-layer f alumtanks"; "  "]
# [component: inputs AC_FlocTank]
# [component: inputs AC_SedTank]
# [component: inputs AC_ChemTanks]
AC_EntranceTank = [
    "-layer m entrancetank"; "c t 214,214,214"; "entrancetank"; "  "; "_-view o t _zoom w 2.57098,7.22,1.43817 1.14,8.65098,2.34056 _box 2.41098,7.38,1.43817 1.3,8.49098,2.34056 _box 2.56098,7.23,1.28817 1.15,8.64098,2.34056 _subtract 2.56098,7.23,1.28817  2.41098,7.38,1.43817 "; "-layer s 0"; "  "; "-layer f entrancetank"; "  "; "-layer s entrancetank"
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]
# [component: inputs AC_EntranceTank]
