# AguaClara Water Treatment Plants
# Automated Design
# Add variable descriptions next to every varible so it is easy to interpret what this all means.
# Design References
# [reference: BasicInputs.xmcd]
# Use BasicClientInputs and ExpertClientInputs when this is run by LabVIEW.
# Use BasicInputs and ExpertInputs to use the program in MathCAD
# Change the reference by
# - right clicking
# - select properties
# - reference tab
# - type in the correct file name
# [reference: ExpertInputs.xmcd]
B_SedPlateFramePipes = 0.3 m
# [reference: DesignAssumptions.xmcd]
# [reference: MathFunctions.xmcd]
# [reference: PipeDatabase.xmcd]
Q_Plant = 10 L/s
# [reference: MinorLossCoefficients.xmcd]
# [reference: FluidsFunctions.xmcd]
# [reference: ChemStorageTanks.xmcd]
# [reference: ChemStorageCylinders.xmcd]
# [reference: Sedimentation Tank.xmcd]
# [reference: Floc Hopper - New Design.xmcd]
# [reference: FCM.xmcd]
# [reference: Flocculator 3.xmcd]
# [reference: RapidMixer.xmcd]
# [reference: EntranceTankDim.xmcd]
# [reference: Materials List.xmcd]
W_SedBay = 1 m
N_SedTanks = 2
W_ExitChannelMin = 0.254 m
W_SedBay = 1 m
N_SedBays = 2
# Sed Tanks and Slopes:
Geom_ExitChannel = 1
B_SedPort =  # error: This variable is undefined.  # Height of the narrowest part of the manifold ports
N_SedTanks = 2
W_SedPort =  # error
H_SedBetween = 0 cm  # Distance from the top of the inlet manifold to the bottom of the ledge supporting the lamella frame
A_SedPort =  # error  # Port Area
L_Sed = 3.2797 m
W_SedSludgeFlat =  # error  # Distance between tips of manifold plates (space alloted for the drain holes
N_SedBays = 2  # Number of bays of inlet manifolds in each sed tank
AN_SedTopInlet =  # error  # Angle of the top of the inlet manifold
L_SedPort =  # error  # Length of the port through which water exits the inlet manifold
AN_SedBottom =  # error  # Angle of the bottom of inlet manifold
W_SedSlopePlate =  # error  # Width of ferrous cement plates in whice one manifold port is cut
Q_SedBay = 2.5 L/s
W_SedBayActual =  # error
L_SedSlopeManifold =  # error  # This is the extra distance between the last slope and the wall
# Sedimentation Tank Sludge Drain:
N_SedSludgeOrifices = 30  # per cell
Ti_SludgeDrain = 30 min  # Tank Drain time
W_SedSludge = 11.2699 cm  # Width of the sludge channel
B_SedSludgeOrifices = 10.8164 cm  # Distance center to center between drain orifices
H_SedSludge = 5.63494 cm  # Depth of the sludge channel
T_SedSludge = 5 cm
T_SedSludge = 5 cm
# Thickness of the plate topping the sludge channel
# through which drain holes are formed
W_SedDrainCover = 21.2699 cm
D_SedSludgeOrifice = 0.014 m  # Diameter of drain orifices
W_SedInletBottom = 0.393651 m
N_SedSludgeOrifices = 30
ND_SedSludgeValve = 1.5 in
# Sedimentation Tank Dimensions:
Z_SedSludge = 0.106349 m  # Height from 0 of the top of the sludge drain
H_SedBottomSlope =  # error  # Height of the bottom slope
H_SedTopSlope =  # error  # Height of the top of the inlet manifold
Z_SedSlopes = 0.744871 m  # Height from 0 of the top of the inlet manifold
W_Sed = 2 m  # Total tank wall height
L_Sed = 3.2797 m  # Total tank length
# Inlet Channel:
HW_InletChannel = 0.128756 m  # Width of the drop chimneys connecting channel to sed inlet manifolds
W_InletChannel = 0.393172 m  # length of drop chimmneys
L_Channel = 4.45 m
W_SedManifoldEntrance =  # error
L_SedManifoldEntrance =  # error
H_SedManifoldPort =  # error  # Ports at bottom of inlet chimney are set to be triangles
W_SedManifoldPort =  # error
N_SedInletPipes = 2  # per sed bay
H_InletChannel = 0.325219 m
# Sedimentation Tank Effluent Launder:
N_SedLaunderOrifices = 30  # Number of orifices per launder
Q_SedLaunderOrifices = 8.37896e-5 m^3/s  # More Launder Dimensions
ND_SedLaunder = 4 in
B_SedLaunderOrifices = 0.127171 m  # Center to center launder spacing
L_SedLaunder = 1.98971 m
# Exit Channel:
D_SedLaunderOrifice = 0.551181 in
W_ExitChannel = 0.517452 m
H_ExitChannel = 0.325219 m
L_ExitChannel = 4.45 m
H_PltWeir = 0.138756 m  # height of the weir carrying water to the distribution tank
HW_ExitChannel = 0.0887562 m  # water height in exit channel from 0
# Lamella:
L_SedPlate = 0.73152 m
B_SedPlate =  # error  # center to center distance between lamella
S_SedPlate = 2.5 cm  # spacing between lamella
N_SedPlates = 60  # Number of Sed Plates per Sedimentation Tank Bay.
AN_SedPlate = 60 deg
ZW_ExitChannel =  # error
V_SedC = 9.29605 m/day
L_SedActive = 1.90757 m
T
V_SedUp = 65.8596 m/day
Z_SedLaunder = 1.5738 m
H_SedPlate = 0.633515 m
H_SedAbove = 0.152359 m  # Height of water needed above the lamella
N_SedPlates = 60
HW_Sed = 1.669 m
H_Sed = 1.769 m
Z_Mp = 1.54025 m
N_SedPorts =  # error
H_SedBayDivider = 0.744871 m
W_SedSlopePlateRemaining =  # error
W_SedBayDivider =  # error
# Sedimentation Tank Floc Hopper:
A_FlocHopper =  # error
L_FlocHopper =  # error  # Length of the hopper cement plate
L_FlocHopperOffset = 0.36576 m  # distance from the edge of the channel to the bottom of the first lamella (collection distance)
W_FlocHopper =  # error  # width of the hopper set within each bay
# Flow Controller:
N_Fcm = 2
ID_FcmTube = 3.175 mm
ID_FcmTube = 0.125 in
L_FcmTube = 125.479 cm
Q_FcmTubeMax = 225 mL/min
HL_FcmValve = 9.40555 cm
# Flocculator: | Look at Flocculator Positioning arrays
W_FlocChannel = 0.5 m
# Fill last channel with bafffles from last channel
# Fix port width to be based on energy dissipation in that channel
ED_Floc = 6 mW/kg
# Adjust spacing after the number of baffles per channel is known.
# Check the residence time of the flocculator should be at least 20minutes
HW_FlocEnd = 1.669 m
X_FlocBaffles = [
    0.161135, 0.161135, 0.161135, 0.24716;
    0.32527, 0.32527, 0.32527, 0.41589;
    0.489406, 0.489406, 0.489406, 0.58462;
    0.653541, 0.653541, 0.653541, 0.75335;
    0.817676, 0.817676, 0.817676, 0.92208;
    0.981811, 0.981811, 0.981811, 1.09081;
    1.14595, 1.14595, 1.14595, 1.25954;
    1.31008, 1.31008, 1.31008, 1.42827;
    1.47422, 1.47422, 1.47422, 1.597;
    1.63835, 1.63835, 1.63835, 1.76573;
    1.80249, 1.80249, 1.80249, 1.93446;
    1.96662, 1.96662, 1.96662, 2.10319;
    2.13076, 2.13076, 2.13076, 2.27192;
    2.29489, 2.29489, 2.29489, 2.44065;
    2.45903, 2.45903, 2.45903, 2.60938;
    2.62316, 2.62316, 2.62316, 2.77811;
    2.7873, 2.7873, 2.7873, 2.94684;
    2.95143, 2.95143, 2.95143, 3.11557;
    3.11557, 3.11557, 3.11557, 0
] m
L_FlocBaffles = [
    1.50787, 1.50787, 1.50787, 1.68034;
    1.68034, 1.68034, 1.68034, 1.50787;
    1.50787, 1.50787, 1.50787, 1.68034;
    1.68034, 1.68034, 1.68034, 1.50787;
    1.50787, 1.50787, 1.50787, 1.68034;
    1.68034, 1.68034, 1.68034, 1.50787;
    1.50787, 1.50787, 1.50787, 1.68034;
    1.68034, 1.68034, 1.68034, 1.50787;
    1.50787, 1.50787, 1.50787, 1.68034;
    1.68034, 1.68034, 1.68034, 1.50787;
    1.50787, 1.50787, 1.50787, 1.68034;
    1.68034, 1.68034, 1.68034, 1.50787;
    1.50787, 1.50787, 1.50787, 1.68034;
    1.68034, 1.68034, 1.68034, 1.50787;
    1.50787, 1.50787, 1.50787, 1.68034;
    1.68034, 1.68034, 1.68034, 1.50787;
    1.50787, 1.50787, 1.50787, 1.68034;
    1.68034, 1.68034, 1.68034, 1.50787;
    1.50787, 1.50787, 1.50787, 0
] m
Z_FlocBaffles = [
    0, 0, 0, 0.16573;
    0.161135, 0.161135, 0.161135, 0;
    0, 0, 0, 0.16573;
    0.161135, 0.161135, 0.161135, 0;
    0, 0, 0, 0.16573;
    0.161135, 0.161135, 0.161135, 0;
    0, 0, 0, 0.16573;
    0.161135, 0.161135, 0.161135, 0;
    0, 0, 0, 0.16573;
    0.161135, 0.161135, 0.161135, 0;
    0, 0, 0, 0.16573;
    0.161135, 0.161135, 0.161135, 0;
    0, 0, 0, 0.16573;
    0.161135, 0.161135, 0.161135, 0;
    0, 0, 0, 0.16573;
    0.161135, 0.161135, 0.161135, 0;
    0, 0, 0, 0.16573;
    0.161135, 0.161135, 0.161135, 0;
    0, 0, 0, 0
] m
N_FlocChannels = 4
L_FlocTank = 13.1188 m
HL_Floc = 12.2472 cm
HW_FlocStart = 1.79148 m
S_FlocBaffle = [16.1135; 16.1135; 16.1135; 16.573] cm
B_FlocBaffle = [16.4135; 16.4135; 16.4135; 16.873] cm
N_FlocChannelBaffles = [19; 19; 19; 18]
W_FlocPort = [0.111135; 0.111135; 0.111135; 0.119774] m
HL_FlocChannels = [3.14187; 3.14187; 3.14187; 2.82157] cm
L_FlocBaffleLower = 1.50787 m
L_FlocBaffleUpper = 1.68034 m
H_FlocPort = [0.724951; 0.724951; 0.724951; 0.691845] m
Ti_Floc = 18.2461 min  # residence time of the flocculator
N_FlocBaffles = 75
# Rapid Mix Unit and Entrance Tank:
L_Et = 1.11098 m
W_Et = 1.11098 m
H_Et = 2.19148 m  # Height of Entrance Tank Orifice
W_EtOrifice[30] = 0.031 m
L_trueET[30] = 0.258528 m  # Length of Entrance Tank Orifice
Pi_EtFlow[30] = 0.278388  # Ratio of the minimum flow divided by the maximum flow through the plant.
L_FlocEntryOrifice = 50 cm  # Length of orifice entering into flocculator from Rapid Mix Unit
W_FlocEntryOrifice = 18.7002 cm  # Height of orifice entering into flocculator
ED_Diffusion =  # error  # Minimum Energy Dissipation needed
HL_FlocEntryOrifice = 0.087035 cm  # Head loss caused by entering flocculation tank.
A_FlocEntry = 0.0935011 m^2
A_EtOrifice = 80.1436 cm^2
HW_EtTotal =  # error  # Total Height of water at beginning of rapid mix unit
HW_Channel2 =  # error  # Height of water at the back of the entrance tank channel (from channel bottom)
HW_EtChannel = 4.76006 cm  # Height of Waterfall into flocculator
W_EtChannel = 16.1135 cm  # Widt of entrance tank channel
Vol_Stock = 810 L  # Volume of chemical stock tanks
ZW_ExitChannel =  # error  # Water Level at the end of the plant in the exit channel and exit channel box
HW_Sed = 1.669 m
HW_FlocStart = 1.79148 m  # Water level at the beginning of the floc tank
HL_Floc = 12.2472 cm  # just for ref. the head loss throught the floc tank
HW_EtTotal =  # error  # Height of the water in the entrance channel
# Materials List:
L_LaunderPipe =  # error
N_Launders = 4
L_LaunderPipeTotal = 7.95882 m
N_Valves = 4
N_LaunderCouplings = 4
N_ValveCouplings = 4
N_SedPlatesTotal = 240
N_SedPlatesPerSheet = 5
N_SedPlateSheets = 48
N_PipeSedPlateStand =  # error
A_SedTank =  # error
# [reference: AutoCADMasterProgram.xmcd]
# AutoCAD References
AC_SedTank =  # no stored result
AC_EntranceTank = [
    "-layer m entrancetank";
    "c t 214,214,214";
    "entrancetank";
    "  ";
    "_-view o t _zoom w 2.27098,6.74,0 0.84,8.17098,2.19148 _box 2.11098,6.9,0 1,8.01098,2.19148 _box 2.26098,6.75,-0.15 0.85,8.16098,2.19148 _subtract 2.26098,6.75,-0.15  2.11098,6.9,0 ";
    "-layer s 0";
    "  ";
    "-layer f entrancetank";
    "  ";
    "-layer s entrancetank";
    "  ";
    "_box 1,6.75,2.14148 1.16114,6.9,2.19148";
    "-layer s 0";
    "  ";
    "-layer t entrancetank";
    "  ";
    "_-view o t";
    "_subtract 2.26098,6.9,0  1,6.75,2.14148 ";
    "-layer f entrancetank";
    "  "
]
AC_FlocTank = [
    "-layer m floctank";
    "c t 91,91,91";
    "floctank";
    "  ";
    "_-view o t _zoom w 0.16,4.14,0 -3.4397,6.91,1.89148 _box 0,4.3,0 -3.2797,6.75,1.89148 _box 0.15,4.15,-0.15 -3.4297,6.9,1.89148 _subtract 0.15,4.15,-0.15  0,4.3,0 ";
    "_box -3.4297,4.8,0 0.15,4.95,1.89148";
    "_box -0.11114,4.8,0.72495 0,4.95,0";
    "_subtract -3.4297,4.8,0  -0.11114,4.8,0.72495 ";
    "_box -3.4297,5.45,0 0.15,5.6,1.89148";
    "_box -3.2797,5.45,0.72495 -3.16857,5.6,0"
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]
