# AguaClara Water Treatment Plants
# Automated Design
# References
# Here we will reference the subprograms: Unit Processes, Hydraulic Design, AutoCAD?, and Report Generator?. In order to be able to transfer data from one subprogram to another we will need to be able to send and recieve everything through function calls.
# [reference: HydraulicDesign.xmcd]
# [reference: UnitProcesses.xmcd]
# Enter Values Here:
# Choose either a Pipe Schedule Number or an SDR rating:
# [component: outputs PipeSpecification]
# Engineer Entered Values:
# Tamara plant flow rate = 740 L/min.
Q_plant := 740*L/min
tank_thick := 20 cm
walkway_width := 1 m
lvltank_thick := 20 cm
FlocTank_width := .8 m
stockplat_thick := lvltank_thick
SedTank_width := FlocTank_width
grit_thick := lvltank_thick
r_drum := .3 m
platform_thick := .5 m
h_drum := .7 m
channel_thick := 10 cm
drum_disp := 6 in
column_dim := [2; 2; .8]*m
stockplatcol_dim := [20; 20; 120]*cm
# Calls Functions Here:
DataDump1 := UnitProcess(Q_plant, SedTank_width, FlocTank_width, r_drum, h_drum)
# convert stuff returned by unit process to stuff needed by hydraulic design, etc.
UnitProcess(Q_plant, SedTank_width, FlocTank_width, r_drum, h_drum)
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DataDump1 = [[3.63277; 0.8; 2]; 2; 0.05; [2; 0.8; 2]; [0.396254; 0.228752; 0.177191]; 1.5; [1; 1; 1]]
DataDump2 := HydraulicDesign(Q_plant, FlocTank_width, PipeSpecification, DataDump1[1]*m, DataDump1[0]*m, DataDump1[2]*m, tank_thick, channel_thick)
DataDump2 =  # error: This variable is undefined.
[waterlevel, manifold_depth, D_orifice/m, grit_holes, lvltank_dim, waste_inr, effluent_inr, SedPipe_length, lvltank_waterlvl, wall_disp, channel_dim, orifice_dist/m]
# Constructing Table:
headerrow := ["Parameter"; "Value"; "Units"]
headercolumn := [
    "Number of Sedimentation Tanks";
    "Lamella Spacing in Sedimentation Tank";
    "Baffle Spacing 1 in Flocculator";
    "Height of Inlet Pipe into Flocculator";
    "Number of baffles in Flocculator Section 1";
    "Water level in Plant";
    "Depth of Manifold";
    "Diameter of orifices in";
    "Number of holes in risers in grit chamber";
    "Inner Radius of Waste pipe";
    "Inner Radius of Effluent pipe";
    "Length of Sed. Pipe";
    "Waterlevel in plant leveling tank";
    "Wall Displacement";
    "Orifice spacing?"
]
Units := ["meter"; " "; "meter"; "meter"; " "; "meter"; "meter"; "meter"; "meter"; " "; "meter"; "meter"; "meter"; "meter"; "meter"; "meter"]
Z := [
    DataDump1[1];
    DataDump1[2];
    DataDump1[4][0];
    DataDump1[5];
    DataDump1[6][0];
    DataDump2[:, 0][0];
    DataDump2[:, 1][0];
    DataDump2[:, 2][0];
    DataDump2[:, 3][0];
    DataDump2[:, 5][0];
    DataDump2[:, 6][0];
    DataDump2[:, 7][0];
    DataDump2[:, 8][0];
    DataDump2[:, 9][0];
    DataDump2[:, 11][0]
]
length(headercolumn) = 15
length(Z) =  # error
table(headerrow, headercolumn, Z) :=
    for i ∈ 0 .. length(headercolumn)
        for j ∈ 0 .. last(headerrow)
            table[i, j] ← headerrow[j] if i == 0
            otherwise
                table[i, j] ← headercolumn[i - 1] if j == 0
                table[i, j] ← Z[i - 1] if j == 1
                table[i, j] ← Units[i - 1] if j == 2
    return table
headercolumn_Dim := [" Sedimentation Tank"; "Dimensions of Flocculator"; "Dimensions of Grit Chamber"; "Dimensions of Leveling Tank"; "Dimensions of Channel"]
headerrow_Dim := ["Component"; "Length"; "Width"; "Height"; "Units"]
Dim_y := [DataDump1[0][1]; DataDump1[3][1]; 5; DataDump2[:, 4][0][1]; DataDump2[:, 10][1]]
Dim_z := [DataDump1[0][2]; DataDump1[3][2]; 5; DataDump2[:, 4][0][2]; DataDump2[:, 10][2]]
Dim_x := [DataDump1[0][0]; DataDump1[3][0]; 5; DataDump2[:, 4][0][0]; DataDump2[:, 10][0]]
Units2 := ["meter"; "meter"; "meter"; "meter"; "meter"]
tableDim(headerrow_Dim, headercolumn_Dim, Dim_x, Dim_y, Dim_z, Units2) :=
    for i ∈ 0 .. length(headercolumn)
        for j ∈ 0 .. last(headerrow_Dim)
            table[i, j] ← headerrow_Dim[j] if i == 0
            otherwise
                table[i, j] ← headercolumn_Dim[i - 1] if j == 0
                table[i, j] ← Dim_x[i - 1] if j == 1
                table[i, j] ← Dim_y[i - 1] if j == 2
                table[i, j] ← Dim_z[i - 1] if j == 3
                table[i, j] ← Units[i - 1] if j == 4
    return table
# Table of Parameters:
# [component: inputs table(headerrow, headercolumn, Z)]
# top
tableDim(headerrow_Dim, headercolumn_Dim, Dim_x, Dim_y, Dim_z, Units2) =  # error
